*Heading
** Job name: Kristensen3PB3D Model name: Model-1
** Generated by: Abaqus/CAE 2022
*Preprint, echo=NO, model=NO, history=NO, contact=NO
**
** PARTS
**
*Part, name=Part-2
*Node
      1,    5.0012393,   1.31412196,           0.
      2,   6.85026693,   1.31412196,           0.
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*Element, type=C3D8
   1,  2844,  9044,   444,   443, 11548, 17748,   481,   482
   2,  3879,  9196,  9195,  3717, 12583, 17900, 17899, 12421
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*Elset, elset=_Surf-1_S6, internal
  261, 2405, 2407
*Elset, elset=_Surf-1_S4, internal
  208,  260,  266, 2406, 2409, 2629, 2631
*Surface, type=ELEMENT, name=Surf-1
_Surf-1_S6, S6
_Surf-1_S4, S4
*Elset, elset=_Surf-2_S3, internal
 13752, 13757
*Elset, elset=_Surf-2_S5, internal
 14439, 14440, 14441, 14442, 14601, 14603, 14611, 14614
*Surface, type=ELEMENT, name=Surf-2
_Surf-2_S3, S3
_Surf-2_S5, S5
*Elset, elset=_Surf-3_S5, internal
   58,  872, 2438, 2625, 2626
*Elset, elset=_Surf-3_S3, internal
   59, 2433, 2434, 2435, 2436
*Surface, type=ELEMENT, name=Surf-3
_Surf-3_S5, S5
_Surf-3_S3, S3
*End Part
**
**
** ASSEMBLY
**
*Assembly, name=Assembly
**
*Instance, name=Part-2-1, part=Part-2
*End Instance
**
*End Assembly
** ----------------------------------------------------------------
**
** STEP: Step-1
**
*Step, name=Step-1, nlgeom=NO
*Static
1., 1., 1e-05, 1.
**
** OUTPUT REQUESTS
**
*Restart, write, frequency=0
**
** FIELD OUTPUT: F-Output-1
**
*Output, field, variable=PRESELECT
**
** HISTORY OUTPUT: H-Output-1
**
*Output, history, variable=PRESELECT
*End Step
