*Heading
** Job name: Job-2 Model name: OWT_monopile_gmsh
** Generated by: Abaqus/CAE 2022
*Preprint, echo=NO, model=NO, history=NO, contact=NO
**
** PARTS
**
*Part, name=PART-1
*Node
      1,   2.69000006,           0.,         -30.
      2,   2.69000006,           0.,           0.
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*Element, type=C3D4
 53302,  9419, 11612,  9144, 13513
 53303, 26334, 26496, 25968, 27955
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*Elset, elset=Set-All, generate
  53302,  153399,       1
*Nset, nset=Set-Mudline
     1,     6,   473,   474,   475,   476
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*Elset, elset=_Surf-1_S1, internal
  53701,  54327,  54544,  55127,  55156,  55463
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*Elset, elset=_Surf-1_S2, internal
  75687,  75782,  77454,  77711,  77970,  77978
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*Elset, elset=_Surf-1_S3, internal
  76141,  76518,  76925,  77066,  77084,  77260
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*Elset, elset=_Surf-1_S4, internal
  64465,  75898,  76497,  76636,  77125,  77258
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*Surface, type=ELEMENT, name=Surf-1
_Surf-1_S1, S1
_Surf-1_S2, S2
_Surf-1_S4, S4
_Surf-1_S3, S3
*Elset, elset=_Surf-2_S1, internal
  55170,  55831,  57370,  58345,  61069,  65824
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*Elset, elset=_Surf-2_S2, internal
 144146, 153259
*Elset, elset=_Surf-2_S3, internal
 151121,
*Elset, elset=_Surf-2_S4, internal
 138617, 144994, 145007, 146910
*Surface, type=ELEMENT, name=Surf-2
_Surf-2_S1, S1
_Surf-2_S2, S2
_Surf-2_S4, S4
_Surf-2_S3, S3
*Elset, elset=_Surf-3_S1, internal
  53677,  53927,  54139,  54534,  55009,  55176
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*Elset, elset=_Surf-3_S2, internal
  53343,  53369,  53408,  53439,  53493,  53514
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*Elset, elset=_Surf-3_S3, internal
  53335,  53573,  53606,  53711,  53815,  54008
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*Elset, elset=_Surf-3_S4, internal
  53305,  53401,  53636,  53845,  54005,  54058
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*Surface, type=ELEMENT, name=Surf-3
_Surf-3_S1, S1
_Surf-3_S2, S2
_Surf-3_S4, S4
_Surf-3_S3, S3
*Elset, elset=_Surf-4_S1, internal
  63389,  69822,  86746, 118536, 120172, 120375
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*Elset, elset=_Surf-4_S2, internal
  54020,  54880,  55335,  55847,  56365,  56492
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*Elset, elset=_Surf-4_S3, internal
  54429,  56319,  57188,  57975,  63027,  76920
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*Elset, elset=_Surf-4_S4, internal
  53842,  53892,  55108,  55467,  57608,  74551
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*Surface, type=ELEMENT, name=Surf-4
_Surf-4_S1, S1
_Surf-4_S2, S2
_Surf-4_S4, S4
_Surf-4_S3, S3
*Elset, elset=_Surf-5_S1, internal
 120083, 120102, 120424, 120794, 121117, 121176
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*Elset, elset=_Surf-5_S2, internal
 120099, 120222, 120475, 120713, 121178, 121187
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*Elset, elset=_Surf-5_S3, internal
 120107, 120478, 120515, 120712, 121113, 121425
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*Elset, elset=_Surf-5_S4, internal
 120217, 120221, 120519, 120692, 120707, 120739
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*Surface, type=ELEMENT, name=Surf-5
_Surf-5_S1, S1
_Surf-5_S2, S2
_Surf-5_S4, S4
_Surf-5_S3, S3
*Elset, elset=_Surf-6_S1, internal
 103187, 120484, 120687, 120743, 121446, 121477
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*Elset, elset=_Surf-6_S2, internal
 120075, 120495, 120513, 120514, 120522, 120749
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*Elset, elset=_Surf-6_S3, internal
 110512, 120218, 120394, 120428, 120686, 120724
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*Elset, elset=_Surf-6_S4, internal
  78227, 120097, 120101, 120280, 120490, 121434
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*Surface, type=ELEMENT, name=Surf-6
_Surf-6_S1, S1
_Surf-6_S2, S2
_Surf-6_S4, S4
_Surf-6_S3, S3
*Elset, elset=_Surf-7_S1, internal
  98820, 120114, 121447, 122190, 125659, 125684
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*Elset, elset=_Surf-7_S2, internal
  97700, 120378, 120735, 121479, 121939, 121969
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*Elset, elset=_Surf-7_S3, internal
 120734, 122192, 124552, 124601, 125428, 125670
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*Elset, elset=_Surf-7_S4, internal
  96825, 101380, 106702, 120088, 120748, 122053
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*Surface, type=ELEMENT, name=Surf-7
_Surf-7_S1, S1
_Surf-7_S2, S2
_Surf-7_S4, S4
_Surf-7_S3, S3
*Elset, elset=_Surf-8_S1, internal
 100322, 125853, 125854, 125858, 125872, 125882
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*Elset, elset=_Surf-8_S2, internal
  96984,  97937, 100037, 100788, 101371, 101741
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*Elset, elset=_Surf-8_S3, internal
  96265,  96545, 100876, 120638, 120727, 121971
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*Elset, elset=_Surf-8_S4, internal
  97325,  97621, 100225, 101288, 120728, 122058
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*Surface, type=ELEMENT, name=Surf-8
_Surf-8_S1, S1
_Surf-8_S2, S2
_Surf-8_S4, S4
_Surf-8_S3, S3
*Elset, elset=_Surf-9_S1, internal
 125948, 125952, 125954, 125978, 125981, 126027
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*Elset, elset=_Surf-9_S2, internal
  95873,  96446,  96647,  97487, 101144, 101854
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*Elset, elset=_Surf-9_S3, internal
  96839,  97301, 100332, 100609, 100873, 100887
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*Elset, elset=_Surf-9_S4, internal
  99869, 100376, 102088, 120092, 122050, 122554
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*Surface, type=ELEMENT, name=Surf-9
_Surf-9_S1, S1
_Surf-9_S2, S2
_Surf-9_S4, S4
_Surf-9_S3, S3
*Elset, elset=_Surf-10_S1, internal
  97186,  99672, 100362, 100743, 126759, 126762
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*Elset, elset=_Surf-10_S2, internal
  95559,  96223,  96939, 120723, 120733, 120741
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*Elset, elset=_Surf-10_S3, internal
  95811,  96612,  99934, 100527, 101098, 101336
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*Elset, elset=_Surf-10_S4, internal
 101455, 101873, 101975, 102165, 120775, 121982
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*Surface, type=ELEMENT, name=Surf-10
_Surf-10_S1, S1
_Surf-10_S2, S2
_Surf-10_S4, S4
_Surf-10_S3, S3
*Elset, elset=_Surf-11_S1, internal
  73533,  95189,  95882,  96539, 101482, 101998
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*Elset, elset=_Surf-11_S2, internal
  95856, 100008, 100068, 100309, 101030, 120098
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*Elset, elset=_Surf-11_S3, internal
  96617, 120089, 120719, 120754, 120768, 120770
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*Elset, elset=_Surf-11_S4, internal
  53655,  53988,  95089, 100218, 101001, 101323
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*Surface, type=ELEMENT, name=Surf-11
_Surf-11_S1, S1
_Surf-11_S2, S2
_Surf-11_S4, S4
_Surf-11_S3, S3
*Elset, elset=_Surf-12_S1, internal
  54408,  55264,  69485,  85937, 115222, 120752
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*Elset, elset=_Surf-12_S2, internal
  53374,  54241,  54824,  55170,  55506,  58429
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*Elset, elset=_Surf-12_S3, internal
  54069,  55831,  56960,  58345,  63676,  63691
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*Elset, elset=_Surf-12_S4, internal
  54843,  55330,  55833,  56845,  57370,  57918
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*Surface, type=ELEMENT, name=Surf-12
_Surf-12_S1, S1
_Surf-12_S2, S2
_Surf-12_S4, S4
_Surf-12_S3, S3
** Section: SteelSection
*Solid Section, elset=Set-All, material=Steel
,
*End Part
**
**
** ASSEMBLY
**
*Assembly, name=Assembly
**
*Instance, name=OWT-1, part=PART-1
*End Instance
**
*End Assembly
**
** MATERIALS
**
*Material, name=Steel
*Density
7850.,
*Elastic
 2.1e+11, 0.3
**
** BOUNDARY CONDITIONS
**
** Name: BC-Pinned Type: Displacement/Rotation
*Boundary
OWT-1.Set-Mudline, 1, 1
OWT-1.Set-Mudline, 2, 2
OWT-1.Set-Mudline, 3, 3
** ----------------------------------------------------------------
**
** STEP: Step-Load
**
*Step, name=Step-Load, nlgeom=YES
*Static
1., 1., 1e-05, 1.
**
** LOADS
**
** Name: Load-RNA-Thrust   Type: Surface traction
*Dsload, op=NEW
OWT-1.Surf-2, TRVEC, 841371., 1., 0., 0.
** Name: Load-RNA-Weight   Type: Surface traction
*Dsload, op=NEW
OWT-1.Surf-2, TRVEC, -4.74356e+06, 0., 0., 1.
** Name: Load-SelfWeight   Type: Gravity
*Dload
, GRAV, 9.81, 0., 0., -1.
** Name: Load-Wave   Type: Surface traction
*Dsload, op=NEW
OWT-1.Surf-3, TRVEC, 6127.51, 1., 0., 0.
** Name: Load-Wind-Seg-4   Type: Surface traction
*Dsload, op=NEW
OWT-1.Surf-4, TRVEC, 21.1373, 1., 0., 0.
** Name: Load-Wind-Seg-5   Type: Surface traction
*Dsload, op=NEW
OWT-1.Surf-5, TRVEC, 24.963, 1., 0., 0.
** Name: Load-Wind-Seg-6   Type: Surface traction
*Dsload, op=NEW
OWT-1.Surf-6, TRVEC, 27.5143, 1., 0., 0.
** Name: Load-Wind-Seg-7   Type: Surface traction
*Dsload, op=NEW
OWT-1.Surf-7, TRVEC, 29.4811, 1., 0., 0.
** Name: Load-Wind-Seg-8   Type: Surface traction
*Dsload, op=NEW
OWT-1.Surf-8, TRVEC, 31.103, 1., 0., 0.
** Name: Load-Wind-Seg-9   Type: Surface traction
*Dsload, op=NEW
OWT-1.Surf-9, TRVEC, 32.4942, 1., 0., 0.
** Name: Load-Wind-Seg-10   Type: Surface traction
*Dsload, op=NEW
OWT-1.Surf-10, TRVEC, 33.7189, 1., 0., 0.
** Name: Load-Wind-Seg-11   Type: Surface traction
*Dsload, op=NEW
OWT-1.Surf-11, TRVEC, 34.817, 1., 0., 0.
** Name: Load-Wind-Seg-12   Type: Surface traction
*Dsload, op=NEW
OWT-1.Surf-12, TRVEC, 35.525, 1., 0., 0.
**
** OUTPUT REQUESTS
**
*Restart, write, frequency=0
**
** FIELD OUTPUT: F-Output-1
**
*Output, field, variable=PRESELECT
**
** HISTORY OUTPUT: H-Output-1
**
*Output, history, variable=PRESELECT
*End Step
